units        real
boundary     p p p
dimension    3
atom_style   full
pair_style        lj/cut  15.0
bond_style        hybrid morse harmonic
angle_style       hybrid harmonic cosine/squared
dihedral_style    opls
read_data         PLA_Gr_1.0.data

pair_coeff 1 1 0.82 3.46
pair_coeff 2 2 0.9553 4.7

bond_coeff 1 morse 196.38 1.55 2.8
bond_coeff 2 harmonic 9.5538 4.34

angle_coeff 1 harmonic 409.4 120
angle_coeff 2 cosine/squared 14.0919 120

dihedral_coeff 1 0 2.075 0 0


pair_modify       mix arithmetic
neighbor          0.3 bin
neigh_modify every 1 delay 0 check yes
thermo_style      custom step etotal temp press vol density
thermo            1000
thermo_modify     flush yes

min_style     cg
min_modify    dmax 0.02
min_modify    line quadratic

minimize          1.0e-4 1.0e-6 100 1000

timestep 	 1.0
#fix 1 all nve
#fix 1 all nvt temp 800.0 800.0 100.0
fix 1 all npt temp 300.0 300.0 100.0 iso 1.0 1.0 1000.0

# Dump minimized system
dump              1 all custom 1000 PLA_Gr_1.0.lammpstrj id type mol x y z
dump_modify 1 sort id

restart 10000 PLA.restart

run               500000

write_data         PLA_Gr_1.0_Equi.data
write_restart      restart.lammps
