################################################################################
# GRAPHENE: TENSILE TEST
################################################################################
#
# This is a lammps input file to simulate the stretching or compression of
# graphene. The output data can be used to calculate the Young's modulus and the
# breaking stress/strain. Buckling of a graphene sheet can be studied by
# compressing the sheet.
#
################################################################################

# UNITS
# The default time step (1fs) for real units is used. Some useful conversion factors are defined.
units        real
timestep     1
variable     fpress  equal 0.000101325  # atm -> GPa
variable     fenergy equal 1.0     # Kcal/mole

# GRAPHENE SHEET
# The atom positions and the simulation box size will be read from a data file.

dimension    3
boundary     p p f
atom_style   full
pair_style        lj/cut  12.0
bond_style        morse
angle_style       harmonic
dihedral_style    opls
read_data    	graphene_equi.data


# OUTPUT
# Calculate the average total, kinetic and potential energy per atom. Stress and
# strain are defined in x and y direction. When calculating the stress, we
# assume that the thickness of graphene is 3.35A.
variable     tmp     equal lx
variable     lx0     equal ${tmp}
variable     tmp     equal ly
variable     ly0     equal ${tmp}
variable     etotal  equal etotal/atoms*${fenergy} #kcal/atom
variable     pe      equal     pe/atoms*${fenergy} #kcal/atom
variable     ke      equal     ke/atoms*${fenergy} #kcal/atom
variable     strainx equal (lx-${lx0})/${lx0}
variable     strainy equal (ly-${ly0})/${ly0}
variable     stressx equal -pxx*(lz/3.35)*${fpress} #GPa
variable     stressy equal -pyy*(lz/3.35)*${fpress} #GPa
thermo_style custom time press v_strainx v_stressx v_strainy v_stressy

# TEMPERATURE SETTINGS
variable     temp index 300
#variable     seed index 1717
#velocity     all create ${temp} ${seed} dist uniform

# EQUILIBRATION
# Relaxation of the system will be done in a NPT ensemble. The size of the
# simulation box can change in x and y direction to resolve stresses. The number
# of time steps should be large enough to relax the system in your final
# simulation but can be small for debugging purposes.
fix          fnpt all npt temp ${temp} ${temp} 10 x 0 0 500 y 0 0 500
thermo       1000
run          400000

# DEFORMATION
# Rescale the box to simulate stretching (scale > 1) or compressing (scale<1)
# of the graphene sheet. Again, a NPT ensemble is used. But this time the size
# of the box can only change in the direction perpendicular to the direction of
# deformation. Change x and y to switch the deformation direction.
fix          boxdeform all deform 1 x scale 2 remap x
fix          fnpt all npt temp ${temp} ${temp} 10 y 0 0 500
dump         1 all atom 1000 dmp.lammpstrj
thermo       1
run          100000
